<?xml version="1.0"?>
<!--
  File:     Hirth_HM_60.xml
  Author:   Aero-Matic v 0.81

  Inputs:
    name:           Hirth_HM_60
    type:           piston
    power:          80 hp
    augmented?      no
    injected?       no

DATA :

Specifications (HM 60R2)

General characteristics
Type: 4 cylinder air cooled inverted inline engine.
Bore: 102 mm (4 in)
Stroke: 110 mm (4.33 in)
Displacement: 3.6 L (220 cu in)
Length: 856 mm (33.7 in)
Width: 391 mm (15.4 in)
Height: 688 mm (27.1 in)
Dry weight: 97 kg (214 lb)
Components
Valvetrain: 1 inlet and 1 exhaust valve per cylinder.
Fuel system: Carburetor
Fuel type: 74 octane
Cooling system: Air-cooled
Performance
Power output: 80 hp (60 kW) at 2,400 rpm
Compression ratio: 5.8:1
Power-to-weight ratio: 0.3 hp/lb (507 W/kg) at cruise speed

-->

<piston_engine name="Hirth_HM_60">
  <minmp unit="INHG">          6.0 </minmp><!-- Deprecated -->
  <maxmp unit="INHG">         29.9 </maxmp><!-- Deprecated -->
  <displacement unit="IN3"> 220.00 </displacement>
<!-- Defining <bsfc> over-rides the bsfc value calculated from <maxhp> -->
  <!--<bsfc>           0.45 </bsfc>-->
  <maxhp>        80.00 </maxhp>
  <cycles>         4.0 </cycles>
  <idlerpm>      700.0 </idlerpm>
  <maxrpm>      2800.0 </maxrpm>
  <maxthrottle>    1.0 </maxthrottle>
  <minthrottle>    0.2 </minthrottle>
  <sparkfaildrop>  0.0 </sparkfaildrop>
</piston_engine>
